# Trabajo Práctico:
#
# Oscilador con par diferencial de frecuencia variable, frecuencia central 12 MHz, tensión de salida 1 volt pico, apto para cargar con 50 ohm, una vez cumplido agregar ajuste de amplitud. O control aut de amplitud.
#
# Datos:
f0 := 12*10^6
a := 2
Q0 := 100
RL := 50
b := 5
# Para comenzar a trabajar, se asume una bobina de 300nHy:
L := 300*10^-9
# Con esta bobina, se calcula la capacidad equivalente para que el circuito resuene en 12MHz.
Ceq := 1/((2*π*f0)^2*L) = 5.86349e-10
# A partir de este punto, se comienza a calcular el capacitor C4, de forma de cumplir el enunciado y poder cargar con 50ohm a la salida. Para ello, se define que XC4 debe ser aproximadamente 10 veces menor a RL y se asume:
XC4 := 5
# Aquí se podrá calcular C4 y luego C3. Se define que b=5.
C4 := 1/(2*π*f0*XC4) = 2.65258e-9
C3 := C4/(b - 1) = 6.63146e-10
# Por último, se obtiene la capacidad equivalente del divisor capacitivo de la salida:
Ceq2 := C3*C4/(C3 + C4) = 5.30516e-10
# Se continúa calculando la capacidad equivalente de los capacitores C1 y C2. Hasta aquí no se considera Cvariable en el diseño del oscilador.
Ceq1 := Ceq - Ceq2 = 5.5833e-11
C2 := a*Ceq1 = 1.11666e-10
C1 := C2/(a - 1) = 1.11666e-10
# Como se trabaja con una bobina ideal, se procede a calcular su Rt y también la resistencia RL reflejada, para obtener la Rtotal siendo el paralelo entre ambas:
Rt := Q0*2*π*f0*L = 2261.95
RL' := RL*b^2 = 1250
Rtot := Rt*RL'/(Rt + RL') = 805.09
# A partir de ahora, ya se cuenta con todos los componentes calculados y resta verificar que la tensión de salida cumpla con lo indicado en el enunciado, entonces se asume IG = 10mA y se calcula tensión de colector y de salida:
IG := 10*10^-3
Vcol := IG*2/π*Rtot = 5.12536
Vsal := Vcol/b = 1.02507
# Se puede observar que el oscilador tiene 1.014V de tensión pico de salida.
# Se observan 16.3V de tensión máxima pico de colector, 7.7V de tensión mínima de colector, montado en una continua de 12V y resultando en una tensión pico de colector de 4.69V.
Tension_Continua := (16.3 - 7.7)/2 + 7.7 = 12
Tension_Pico_de_Colector := 16.3 - Tension_Continua = 4.3
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