C3 := 39*10^-12
f0 := 12*10^6
a := 5
C4 := 10*10^-12
R := 50
b := 5
Qc := 100
Cx := 100*10^-6
L := 1/(2*π*f0)*R/Qc = 6.63146e-9
Ceq := 1/((2*π*f0)^2*L) = 2.65258e-8
Ceq2 := C3*C4/(C3 + C4) = 7.95918e-12
C' := C3*Cx/(C3 + Cx) = 3.9e-11
Ceq1 := Ceq - Ceq2 = 2.65179e-8
C2 := a*Ceq1 = 1.32589e-7
C1 := C2/(a - 1) = 3.31473e-8
