C3 := 39*10^-12
f0 := 12*10^6
a := 2
C4 := 10*10^-12
RL := 50
b := 5
Q0 := 100
Cx := 100*10^-6
L := 300*10^-9
Ceq := 1/((2*π*f0)^2*L) = 5.86349e-10
Ceq2 := Ceq/2 = 2.93175e-10
C' := C3*Cx/(C3 + Cx) = 3.9e-11
Ceq1 := Ceq - Ceq2 = 2.93175e-10
C2 := a*Ceq1 = 5.86349e-10
C4 := b*Ceq2 = 1.46587e-9
C1 := C2/(a - 1) = 5.86349e-10
C3 := C4/(b - 1) = 3.66468e-10
Ceq1 := C1*C2/(C1 + C2) = 2.93175e-10
XC4 := 1/(2*π*f0*C4) = 9.04779
C4' := 1/(2*π*f0*5) = 2.65258e-9
C3' := C4'/(b - 1) = 6.63146e-10
Ceq2' := C3'*C4'/(C3' + C4') = 5.30516e-10
Ceq1' := Ceq - Ceq2' = 5.5833e-11
C2' := a*Ceq1' = 1.11666e-10
C1' := C2'/(a - 1) = 1.11666e-10
XC4' := 1/(2*π*f0*C4') = 5
Rt := Q0*2*π*f0*L = 2261.95
RL' := RL*b^2 = 1250
Rtot := Rt*RL'/(Rt + RL') = 805.09
IG := 2*10^-3
Vcol := IG*2/π*Rtot = 1.02507
Vsal := Vcol/b = 0.205015
